<?xml version="1.0"?>
<!-- Generated by Aero-Matic v 1.1

     Inputs:
                horsepower: 4590.243
                     pitch: variable
            max engine rpm: 2700
        prop diameter (ft): 13.5

     Outputs:
              max prop rpm: 1389.85
                gear ratio:    1.94
                       Cp0: 0.190487
                       Ct0: 0.443835
       static thrust (lbs): 18810.63
-->

<propeller name="prop">
  <ixx> 129.61 </ixx>
  <diameter unit="IN"> 162.0 </diameter>
  <numblades> 6 </numblades>
  <gearratio>  13.98 </gearratio>
  <p_factor>  12.80 </p_factor>
  <minpitch> 11 </minpitch>
  <maxpitch> 60 </maxpitch>
  <minrpm>    681 </minrpm>
  <maxrpm>   1057 </maxrpm>
  <constspeed>1</constspeed>

  <ct_factor>1.6</ct_factor>
  <cp_factor>1.5</cp_factor>

 <!-- thrust coefficient as a function of advance ratio and blade angle -->
  <table name="C_THRUST" type="internal">
      <tableData>
                -10        0         15        25        35        45        55        65       90
      -0.2      -0.2166    0.1221    0.04438   0.5437    0.5992    0.6325    0.5828    0.4993   0.0000
       0.0      -0.3218    0.0500    0.54438   0.6437    0.7992    0.8382    0.7965    0.4993   0.0000
       0.2      -0.3608   -0.1110    0.43830   0.5326    0.5907    0.6382    0.5965    0.4993   0.0000
       0.4      -0.3608   -0.2579    0.3885    0.5273    0.5796    0.6325    0.5965    0.4993   0.0000
       0.6      -0.3608   -0.3608    0.2527    0.4745    0.5548    0.6160    0.5881    0.4993   0.0000
       0.8      -0.3608   -0.3608    0.1084    0.3551    0.5384    0.5939    0.5881    0.4993   0.0000
       1.0      -0.3608   -0.3608   -0.0442    0.2166    0.5162    0.5632    0.5828    0.4993   0.0000
       1.2      -0.3608   -0.3608   -0.1969    0.0666    0.4243    0.5437    0.5828    0.4993   0.0000
       1.4      -0.3608   -0.3608   -0.2608   -0.0972    0.3054    0.5353    0.5717    0.4993   0.0000
       1.6      -0.3608   -0.3608   -0.3608   -0.2468    0.1664    0.5162    0.5606    0.4993   0.0000
       1.8      -0.3608   -0.3608   -0.3608   -0.3608    0.0280    0.4438    0.5437    0.4993   0.0000
       2.0      -0.3608   -0.3608   -0.3608   -0.3608   -0.1110    0.3466    0.5415    0.4993   0.0000
       2.2      -0.3608   -0.3608   -0.3608   -0.3608   -0.2499    0.2499    0.5326    0.4993   0.0000
       2.4      -0.3608   -0.3608   -0.3608   -0.3608   -0.3608    0.1332    0.4350    0.4993   0.0000
       2.6      -0.3608   -0.3608   -0.3608   -0.3608   -0.3608    0.0169    0.2752    0.4438   0.0000
       2.8      -0.3608   -0.3608   -0.3608   -0.3608   -0.3608   -0.0999    0.1802    0.3608   0.0000
       3.0      -0.3608   -0.3608   -0.3608   -0.3608   -0.3608   -0.2166    0.0945    0.2774   0.0000
       3.2      -0.3608   -0.3608   -0.3608   -0.3608   -0.3608   -0.3329    0.0084    0.1944   0.0000
       3.4      -0.3608   -0.3608   -0.3608   -0.3608   -0.3608   -0.3608   -0.0777    0.1110   0.0000
       3.6      -0.3608   -0.3608   -0.3608   -0.3608   -0.3608   -0.3608   -0.1638    0.0280   0.0000
       3.8      -0.3608   -0.3608   -0.3608   -0.3608   -0.3608   -0.3608   -0.2499   -0.0555   0.0000
       4.0      -0.3608   -0.3608   -0.3608   -0.3608   -0.3608   -0.3608   -0.3355   -0.1389   0.0000
       6.0      -0.3608   -0.3608   -0.3608   -0.3608   -0.3608   -0.3608   -0.3608   -0.3608   0.0000
      </tableData>
  </table>

 <!-- power coefficient as a function of advance ratio and blade angle -->
  <table name="C_POWER" type="internal">
     <tableData>
               -10        0        15        25        35        45        55        65       90
      -0.2      0.0318   0.0634    0.2223    0.5048    0.8705    1.2382    1.4287    1.5810   1.5810
       0.0      0.1271   0.0318    0.1905    0.4705    0.8324    1.2382    1.4344    1.5810   1.5810
       0.2      0.1810   0.0509    0.1842    0.4381    0.7962    1.2382    1.4344    1.5810   1.5810
       0.4      0.2438   0.1111    0.1587    0.4038    0.7562    1.2382    1.4344    1.5810   1.5810
       0.6      0.2991   0.1682    0.1048    0.3753    0.7086    1.2134    1.4287    1.5810   1.5810
       0.8      0.3524   0.2253    0.0318    0.3181    0.6667    1.1582    1.4287    1.5810   1.5810
       1.0      0.4057   0.2800    0.0318    0.2229    0.6286    1.0991    1.4229    1.5810   1.5810
       1.2      0.4610   0.2238   -0.1048    0.0857    0.5562    1.0534    1.4134    1.5810   1.5810
       1.4      0.5143   0.3867   -0.1581   -0.0634    0.4286    1.0382    1.3963    1.5810   1.5810
       1.6      0.5677   0.4419   -0.1848   -0.1905    0.2705    1.0096    1.3658    1.5239   1.5810
       1.8      0.6229   0.4953   -0.1905   -0.3181    0.0794    0.8953    1.3239    1.4915   1.5810
       2.0      0.6762   0.5486   -0.2438   -0.4438   -0.0952    0.7619    1.2610    1.4610   1.5810
       2.2      0.7296   0.6038   -0.2991   -0.5715   -0.2857    0.6191    1.2229    1.3963   1.5810
       2.4      0.7848   0.6572   -0.3524   -0.6991   -0.4762    0.4419    1.1867    1.3658   1.5810
       2.6      0.8381   0.7105   -0.4057   -0.8248   -0.6038    0.1848    1.1582    1.3182   1.5810
       2.8      0.8915   0.7658   -0.4610   -0.9524   -0.7239   -0.0629    1.1334    1.3010   1.5810
       3.0      0.9467   0.8191   -0.5143   -1.0801   -0.8572   -0.2857    1.0953    1.3010   1.5810
       3.2      1.0001   0.8724   -0.5677   -1.2058   -0.9848   -0.5086    1.0248    1.2705   1.5810
       3.4      1.0534   0.9277   -0.6229   -1.3334   -1.1105   -0.7296    0.7943    1.2382   1.5810
       3.6      1.1086   0.9810   -0.6762   -1.4610   -1.2382   -0.9524    0.5581    1.2058   1.5810
       3.8      1.1620   1.0343   -0.7296   -1.5810   -1.3658   -1.1753    0.3105    1.1677   1.5810
       4.0      1.2153   1.0896   -0.7848   -1.5810   -1.5810   -1.3963    0.0629    1.0801   1.5810
       6.0      1.5810   1.5810   -1.5810   -1.5810   -1.5810   -1.5810   -1.5810   -0.9524   1.5810
     </tableData>
  </table>

<!-- thrust effects of helical tip Mach -->
<table name="CT_MACH" type="internal">
  <tableData>
    0.85   1.0
    1.05   0.8
  </tableData>
</table>

<!-- power-required effects of helical tip Mach -->
<table name="CP_MACH" type="internal">
  <tableData>
    0.85   1.0
    1.05   1.8
    2.00   1.4
  </tableData>
</table>

</propeller>
